!--- OpenDSS Linecodes file generated from Show LINECONSTANTS command
!--- Frequency = 60 Hz, Earth resistivity = 100 ohm-m
!--- Earth Model = Deri

New Linecode.2/0triplex nphases=3  Units=kft
~ Rmatrix=[0.159168  |0.0177829  0.159167  |0.0177832  0.0177829  0.159168  ]
~ Xmatrix=[0.285066  |0.255902  0.285066  |0.255903  0.255902  0.285066  ]
~ Cmatrix=[12.1852  |-5.70718  12.1831  |-5.70743  -5.70718  12.1852  ]

New Linecode.4/0triplex nphases=3  Units=kft
~ Rmatrix=[0.10685  |0.0177829  0.10685  |0.0177832  0.0177829  0.10685  ]
~ Xmatrix=[0.279715  |0.255902  0.279715  |0.255903  0.255902  0.279715  ]
~ Cmatrix=[16.0503  |-7.6353  16.0471  |-7.63601  -7.6353  16.0503  ]
